OpenVSP model (file version 5), 85 components.
Geometry view with OpenVSP parameter names; values to 6 digits, angles in degrees, lengths in the model's unit.
Overall bounding box: X_Min=-21.4303 X_Len=42.8319 Y_Min=-21.4141 Y_Len=42.8281 Z_Min=-7.39303 Z_Len=13.4633

Blank "ndarcSLBLWL"
  location (X Y Z) 0 0 0, rotation 0 0 0

Fuselage "fg_100_fuselage", child of "ndarcSLBLWL"
  location (X Y Z) -11 0 -1.41304, rotation 0 0 0
  bounding box size 21.275 6.52877 6.93988
  mass: Density=0.027565 Shell_Flag=0 Mass_Area=1 Mass_Prior=1
  Design: Length=21
  cross sections:
    n  XLocPercent  YLocPercent  ZLocPercent  shape
    0  0            0            -0.0817391   point
    1  0.30145      0            -0.0533472   general fuselage BotStr=1.39745 BotTanAngle=85.9091 CornerRad=0 Height=6 LowStr=1.32259 MaxWidthLoc=0 TopStr=0.785604 TopTanAngle=90 UpStr=1.34755 Width=6.25909
    2  0.490545     0            -0.0413894   general fuselage BotStr=1.39745 BotTanAngle=85.9091 CornerRad=0 Height=6.7455 LowStr=1.32259 MaxWidthLoc=0.172727 TopStr=1.46651 TopTanAngle=90 UpStr=0.955949 Width=6.42973
    3  0.669739     0            -0.037689    general fuselage BotStr=1.39745 BotTanAngle=85.9091 CornerRad=0 Height=6.63824 LowStr=1.32259 MaxWidthLoc=0.4 TopStr=1.43141 TopTanAngle=90 UpStr=0.738126 Width=6.25909
    4  0.818715     0            -0.00504735  general fuselage BotStr=1.12295 BotTanAngle=90 CornerRad=0 Height=5.06558 LowStr=0.911463 MaxWidthLoc=0.672727 TopStr=1.64396 TopTanAngle=86.3182 UpStr=0.164678 Width=4.37339
    5  1            0            0.0903237    point
  SS_Rectangle "SS_RECT_0": Center_U=0.141304 Center_W=0.788043 U_Length=0.146739 W_Length=0.570652
  SS_Rectangle "SS_RECT_1": Center_U=0.141304 Center_W=0.25 U_Length=0.146739 W_Length=0.456522

Propeller "r_1_bld", child of "ndarcSLBLWL"
  location (X Y Z) -12.3017 12.3017 2.09889, rotation 0 87 0
  bounding box size 18.2285 18.2247 0.974836
  mass: Density=1.839 Shell_Flag=0 Mass_Area=1 Mass_Prior=0
  Design: Diameter=18.2247 NumBlade=3 Beta34=0 UseBeta34Flag=1 Feather=0 Rotate=-30 Precone=0 ReverseFlag=0 FoldAngle=0 PropMode=1 AF=52.5146 CLi=0.19968 Chord=0.068119 Solidity=0.0650489 ConstructXoC=0.25 FeatherAxisXoC=0.25 FeatherOffsetXoC=0
  cross sections:
    n  RadiusFrac  shape
    0  0.15        airfoil file "BOEING-VERTOL VR-12 AIRFOIL"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 BaseThickChord=0.106373 Chord=0.634306 ThickChord=0.1064
    1  0.85        airfoil file "BOEING-VERTOL VR-12 AIRFOIL"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 BaseThickChord=0.106373 Chord=0.611938 ThickChord=0.1064
    2  0.95        airfoil file "SIKORSKY SSC-A09  AIRFOIL"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 BaseThickChord=0.0901604 Chord=0.608742 ThickChord=0.0902
    3  1           airfoil file "SIKORSKY SSC-A09  AIRFOIL"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 BaseThickChord=0.0901604 Chord=0.607145 ThickChord=0.09016
  Chord along r/R (linear): 0.15: 0.0696094, 1: 0.0666286
  Twist along r/R (linear): 0.15: 9.6, 0.75: 0, 1: -4
  Thick along r/R (linear): 0.15: 0.1064, 0.85: 0.1064, 0.95: 0.0902, 1: 0.09016
  CLI along r/R (linear): 0.15: 0.2, 0.85: 0.2, 0.95: 0.2, 1: 0.2

Blank "r_1_mass", child of "r_1_bld"
  location (X Y Z) -12.3017 12.3017 2.09889, rotation 0 87 0; relative location 0 0 0, rotation 0 0 0
  mass: Density=1 Shell_Flag=0 Mass_Area=1 Mass_Prior=0 PointMass=1.466 CGx=0 CGy=0 CGz=0 Ixx=0 Iyy=0 Izz=0 Ixy=0 Ixz=0 Iyz=0

Stack "r_1_hub", child of "r_1_bld"
  location (X Y Z) -12.354 12.3017 3.09752, rotation 0 87 0; relative location -1 0 0, rotation 0 0 0
  bounding box size 1.86411 1.86667 1.33148
  cross sections:
    n  XDelta  YDelta  ZDelta  shape
    0  0       0       0       point
    1  1       0       0       circle Circle_Diameter=1.7
    2  0.25    0       0       as above
    3  0       0       0       point

Stack "r_1_pyl", child of "r_1_bld"
  location (X Y Z) -12.2886 12.3017 1.84923, rotation 0 87 0; relative location 0.25 0 0, rotation 0 0 0
  bounding box size 1.7173 1.7 1.32712
  cross sections:
    n  XDelta  YDelta  ZDelta  shape
    0  0       0       0       point
    1  0       0       0       circle Circle_Diameter=1.7
    2  0.25    0       0       as above
    3  1       0       0       point

Blank "s_005.frcollfltctrl", child of "r_1_bld"
  location (X Y Z) -12.2991 12.3017 2.04895, rotation 0 87 0; relative location 0.05 0 0, rotation 0 0 0
  mass: Density=1 Shell_Flag=0 Mass_Area=1 Mass_Prior=0 PointMass=2431.65 CGx=0 CGy=0 CGz=0 Ixx=0 Iyy=0 Izz=0 Ixy=0 Ixz=0 Iyz=0

Blank "s_001.frdeice", child of "r_1_bld"
  location (X Y Z) -12.2965 12.3017 1.99902, rotation 0 87 0; relative location 0.1 0 0, rotation 0 0 0
  mass: Density=1 Shell_Flag=0 Mass_Area=1 Mass_Prior=0 PointMass=486.33 CGx=0 CGy=0 CGz=0 Ixx=0 Iyy=0 Izz=0 Ixy=0 Ixz=0 Iyz=0

Blank "pn-1-023.frgbmass", child of "r_1_bld"
  location (X Y Z) -12.2651 12.3017 1.39985, rotation 0 87 0; relative location 0.7 0 0, rotation 0 0 0
  mass: Density=1 Shell_Flag=0 Mass_Area=1 Mass_Prior=0 PointMass=1.811 CGx=0 CGy=0 CGz=0 Ixx=0 Iyy=0 Izz=0 Ixy=0 Ixz=0 Iyz=0

Stack "pn_1_000.rfgbvol", child of "r_1_bld"
  location (X Y Z) -12.2808 12.3017 1.69943, rotation 0 87 0; relative location 0.4 0 0, rotation 0 0 0
  bounding box size 1.00774 1 0.226097
  cross sections:
    n  XDelta  YDelta  ZDelta  shape
    0  0       0       0       point
    1  0       0       0       circle Circle_Diameter=1
    2  0.174   0       0       as above
    3  0       0       0       point

Stack "pn_1_000.frcoolvol", child of "r_1_bld"
  location (X Y Z) -12.2494 12.3017 1.10026, rotation 0 87 0; relative location 1 0 0, rotation 0 0 0
  bounding box size 1.01171 1 0.301993
  cross sections:
    n  XDelta  YDelta  ZDelta  shape
    0  0       0       0       point
    1  0       0       0       circle Circle_Diameter=1
    2  0.25    0       0       as above
    3  0       0       0       point

Stack "pn_1_000.rfgbshaftvol", child of "r_1_bld"
  location (X Y Z) -12.3069 12.3017 2.19875, rotation 0 87 0; relative location -0.1 0 0, rotation 0 0 0
  bounding box size 0.281059 0.25 0.612262
  cross sections:
    n  XDelta  YDelta  ZDelta  shape
    0  0       0       0       point
    1  0       0       0       circle Circle_Diameter=0.25
    2  0.6     0       0       as above
    3  0       0       0       point

Propeller "r_2_bld", child of "ndarcSLBLWL"
  location (X Y Z) -12.3017 -12.3017 2.09889, rotation 0 87 0
  bounding box size 18.2285 18.2247 0.974836
  mass: Density=1.839 Shell_Flag=0 Mass_Area=1 Mass_Prior=0
  Design: Diameter=18.2247 NumBlade=3 Beta34=0 UseBeta34Flag=1 Feather=0 Rotate=30 Precone=0 ReverseFlag=1 FoldAngle=0 PropMode=1 AF=52.5146 CLi=0.19968 Chord=0.068119 Solidity=0.0650489 ConstructXoC=0.25 FeatherAxisXoC=0.25 FeatherOffsetXoC=0
  cross sections:
    n  RadiusFrac  shape
    0  0.15        airfoil file "BOEING-VERTOL VR-12 AIRFOIL"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 BaseThickChord=0.106373 Chord=0.634306 ThickChord=0.1064
    1  0.85        airfoil file "BOEING-VERTOL VR-12 AIRFOIL"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 BaseThickChord=0.106373 Chord=0.611938 ThickChord=0.1064
    2  0.95        airfoil file "SIKORSKY SSC-A09  AIRFOIL"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 BaseThickChord=0.0901604 Chord=0.608742 ThickChord=0.0902
    3  1           airfoil file "SIKORSKY SSC-A09  AIRFOIL"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 BaseThickChord=0.0901604 Chord=0.607145 ThickChord=0.09016
  blade curves as in "r_1_bld"

Blank "r_2_mass", child of "r_2_bld"
  location (X Y Z) -12.3017 -12.3017 2.09889, rotation 0 87 0; relative location 0 0 0, rotation 0 0 0
  mass: Density=1 Shell_Flag=0 Mass_Area=1 Mass_Prior=0 PointMass=1.466 CGx=0 CGy=0 CGz=0 Ixx=0 Iyy=0 Izz=0 Ixy=0 Ixz=0 Iyz=0

Stack "r_2_hub", child of "r_2_bld"
  location (X Y Z) -12.354 -12.3017 3.09752, rotation 0 87 0; relative location -1 0 0, rotation 0 0 0
  bounding box size 1.86411 1.86667 1.33148
  cross sections:
    n  XDelta  YDelta  ZDelta  shape
    0  0       0       0       point
    1  1       0       0       circle Circle_Diameter=1.7
    2  0.25    0       0       as above
    3  0       0       0       point

Stack "r_2_pyl", child of "r_2_bld"
  location (X Y Z) -12.2886 -12.3017 1.84923, rotation 0 87 0; relative location 0.25 0 0, rotation 0 0 0
  bounding box size 1.7173 1.7 1.32712
  cross sections:
    n  XDelta  YDelta  ZDelta  shape
    0  0       0       0       point
    1  0       0       0       circle Circle_Diameter=1.7
    2  0.25    0       0       as above
    3  1       0       0       point

Blank "s_005.flcollfltctrl", child of "r_2_bld"
  location (X Y Z) -12.2991 -12.3017 2.04895, rotation 0 87 0; relative location 0.05 0 0, rotation 0 0 0
  mass: Density=1 Shell_Flag=0 Mass_Area=1 Mass_Prior=0 PointMass=2431.65 CGx=0 CGy=0 CGz=0 Ixx=0 Iyy=0 Izz=0 Ixy=0 Ixz=0 Iyz=0

Blank "s_001.fldeice", child of "r_2_bld"
  location (X Y Z) -12.2965 -12.3017 1.99902, rotation 0 87 0; relative location 0.1 0 0, rotation 0 0 0
  mass: Density=1 Shell_Flag=0 Mass_Area=1 Mass_Prior=0 PointMass=486.33 CGx=0 CGy=0 CGz=0 Ixx=0 Iyy=0 Izz=0 Ixy=0 Ixz=0 Iyz=0

Blank "pn-1-023.flgbmass", child of "r_2_bld"
  location (X Y Z) -12.2651 -12.3017 1.39985, rotation 0 87 0; relative location 0.7 0 0, rotation 0 0 0
  mass: Density=1 Shell_Flag=0 Mass_Area=1 Mass_Prior=0 PointMass=1.811 CGx=0 CGy=0 CGz=0 Ixx=0 Iyy=0 Izz=0 Ixy=0 Ixz=0 Iyz=0

Stack "pn_1_000.rfgbvol", child of "r_2_bld"
  location (X Y Z) -12.2808 -12.3017 1.69943, rotation 0 87 0; relative location 0.4 0 0, rotation 0 0 0
  bounding box size 1.00774 1 0.226097
  cross sections:
    n  XDelta  YDelta  ZDelta  shape
    0  0       0       0       point
    1  0       0       0       circle Circle_Diameter=1
    2  0.174   0       0       as above
    3  0       0       0       point

Stack "pn_1_000.flcoolvol", child of "r_2_bld"
  location (X Y Z) -12.2494 -12.3017 1.10026, rotation 0 87 0; relative location 1 0 0, rotation 0 0 0
  bounding box size 1.01171 1 0.301993
  cross sections:
    n  XDelta  YDelta  ZDelta  shape
    0  0       0       0       point
    1  0       0       0       circle Circle_Diameter=1
    2  0.25    0       0       as above
    3  0       0       0       point

Stack "pn_1_000.rfgbshaftvol", child of "r_2_bld"
  location (X Y Z) -12.3069 -12.3017 2.19875, rotation 0 87 0; relative location -0.1 0 0, rotation 0 0 0
  bounding box size 0.281059 0.25 0.612262
  cross sections:
    n  XDelta  YDelta  ZDelta  shape
    0  0       0       0       point
    1  0       0       0       circle Circle_Diameter=0.25
    2  0.6     0       0       as above
    3  0       0       0       point

Propeller "r_3_bld", child of "ndarcSLBLWL"
  location (X Y Z) 12.3017 12.3017 5.03733, rotation 0 87 0
  bounding box size 18.2285 18.2247 0.974836
  mass: Density=1.839 Shell_Flag=0 Mass_Area=1 Mass_Prior=0
  Design: Diameter=18.2247 NumBlade=3 Beta34=0 UseBeta34Flag=1 Feather=0 Rotate=30 Precone=0 ReverseFlag=1 FoldAngle=0 PropMode=1 AF=52.5146 CLi=0.19968 Chord=0.068119 Solidity=0.0650489 ConstructXoC=0.25 FeatherAxisXoC=0.25 FeatherOffsetXoC=0
  cross sections:
    n  RadiusFrac  shape
    0  0.15        airfoil file "BOEING-VERTOL VR-12 AIRFOIL"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 BaseThickChord=0.106373 Chord=0.634306 ThickChord=0.1064
    1  0.85        airfoil file "BOEING-VERTOL VR-12 AIRFOIL"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 BaseThickChord=0.106373 Chord=0.611938 ThickChord=0.1064
    2  0.95        airfoil file "SIKORSKY SSC-A09  AIRFOIL"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 BaseThickChord=0.0901604 Chord=0.608742 ThickChord=0.0902
    3  1           airfoil file "SIKORSKY SSC-A09  AIRFOIL"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 BaseThickChord=0.0901604 Chord=0.607145 ThickChord=0.09016
  blade curves as in "r_1_bld"

Blank "r_3_mass", child of "r_3_bld"
  location (X Y Z) 12.3017 12.3017 5.03733, rotation 0 87 0; relative location 0 0 0, rotation 0 0 0
  mass: Density=1 Shell_Flag=0 Mass_Area=1 Mass_Prior=0 PointMass=1.466 CGx=0 CGy=0 CGz=0 Ixx=0 Iyy=0 Izz=0 Ixy=0 Ixz=0 Iyz=0

Stack "r_3_hub", child of "r_3_bld"
  location (X Y Z) 12.2494 12.3017 6.03596, rotation 0 87 0; relative location -1 0 0, rotation 0 0 0
  bounding box size 1.86411 1.86667 1.33148
  cross sections:
    n  XDelta  YDelta  ZDelta  shape
    0  0       0       0       point
    1  1       0       0       circle Circle_Diameter=1.7
    2  0.25    0       0       as above
    3  0       0       0       point

Stack "r_3_pyl", child of "r_3_bld"
  location (X Y Z) 12.3148 12.3017 4.78767, rotation 0 87 0; relative location 0.25 0 0, rotation 0 0 0
  bounding box size 1.7173 1.7 1.32712
  cross sections:
    n  XDelta  YDelta  ZDelta  shape
    0  0       0       0       point
    1  0       0       0       circle Circle_Diameter=1.7
    2  0.25    0       0       as above
    3  1       0       0       point

Blank "s_005.arcollfltctrl", child of "r_3_bld"
  location (X Y Z) 12.3043 12.3017 4.9874, rotation 0 87 0; relative location 0.05 0 0, rotation 0 0 0
  mass: Density=1 Shell_Flag=0 Mass_Area=1 Mass_Prior=0 PointMass=2431.65 CGx=0 CGy=0 CGz=0 Ixx=0 Iyy=0 Izz=0 Ixy=0 Ixz=0 Iyz=0

Blank "s_001.ardeice", child of "r_3_bld"
  location (X Y Z) 12.3069 12.3017 4.93746, rotation 0 87 0; relative location 0.1 0 0, rotation 0 0 0
  mass: Density=1 Shell_Flag=0 Mass_Area=1 Mass_Prior=0 PointMass=486.33 CGx=0 CGy=0 CGz=0 Ixx=0 Iyy=0 Izz=0 Ixy=0 Ixz=0 Iyz=0

Blank "pn-1-023.argbmass", child of "r_3_bld"
  location (X Y Z) 12.3383 12.3017 4.33829, rotation 0 87 0; relative location 0.7 0 0, rotation 0 0 0
  mass: Density=1 Shell_Flag=0 Mass_Area=1 Mass_Prior=0 PointMass=1.811 CGx=0 CGy=0 CGz=0 Ixx=0 Iyy=0 Izz=0 Ixy=0 Ixz=0 Iyz=0

Stack "pn_1_000.rfgbvol", child of "r_3_bld"
  location (X Y Z) 12.3226 12.3017 4.63788, rotation 0 87 0; relative location 0.4 0 0, rotation 0 0 0
  bounding box size 1.00774 1 0.226097
  cross sections:
    n  XDelta  YDelta  ZDelta  shape
    0  0       0       0       point
    1  0       0       0       circle Circle_Diameter=1
    2  0.174   0       0       as above
    3  0       0       0       point

Stack "pn_1_000.arcoolvol", child of "r_3_bld"
  location (X Y Z) 12.354 12.3017 4.0387, rotation 0 87 0; relative location 1 0 0, rotation 0 0 0
  bounding box size 1.01171 1 0.301993
  cross sections:
    n  XDelta  YDelta  ZDelta  shape
    0  0       0       0       point
    1  0       0       0       circle Circle_Diameter=1
    2  0.25    0       0       as above
    3  0       0       0       point

Stack "pn_1_000.rfgbshaftvol", child of "r_3_bld"
  location (X Y Z) 12.2965 12.3017 5.13719, rotation 0 87 0; relative location -0.1 0 0, rotation 0 0 0
  bounding box size 0.281059 0.25 0.612262
  cross sections:
    n  XDelta  YDelta  ZDelta  shape
    0  0       0       0       point
    1  0       0       0       circle Circle_Diameter=0.25
    2  0.6     0       0       as above
    3  0       0       0       point

Propeller "r_4_bld", child of "ndarcSLBLWL"
  location (X Y Z) 12.3017 -12.3017 5.03733, rotation 0 87 0
  bounding box size 18.2285 18.2247 0.974836
  mass: Density=1.839 Shell_Flag=0 Mass_Area=1 Mass_Prior=0
  Design: Diameter=18.2247 NumBlade=3 Beta34=0 UseBeta34Flag=1 Feather=0 Rotate=-30 Precone=0 ReverseFlag=0 FoldAngle=0 PropMode=1 AF=52.5146 CLi=0.19968 Chord=0.068119 Solidity=0.0650489 ConstructXoC=0.25 FeatherAxisXoC=0.25 FeatherOffsetXoC=0
  cross sections:
    n  RadiusFrac  shape
    0  0.15        airfoil file "BOEING-VERTOL VR-12 AIRFOIL"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 BaseThickChord=0.106373 Chord=0.634306 ThickChord=0.1064
    1  0.85        airfoil file "BOEING-VERTOL VR-12 AIRFOIL"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 BaseThickChord=0.106373 Chord=0.611938 ThickChord=0.1064
    2  0.95        airfoil file "SIKORSKY SSC-A09  AIRFOIL"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 BaseThickChord=0.0901604 Chord=0.608742 ThickChord=0.0902
    3  1           airfoil file "SIKORSKY SSC-A09  AIRFOIL"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 BaseThickChord=0.0901604 Chord=0.607145 ThickChord=0.09016
  blade curves as in "r_1_bld"

Blank "r_4_mass", child of "r_4_bld"
  location (X Y Z) 12.3017 -12.3017 5.03733, rotation 0 87 0; relative location 0 0 0, rotation 0 0 0
  mass: Density=1 Shell_Flag=0 Mass_Area=1 Mass_Prior=0 PointMass=1.466 CGx=0 CGy=0 CGz=0 Ixx=0 Iyy=0 Izz=0 Ixy=0 Ixz=0 Iyz=0

Stack "r_4_hub", child of "r_4_bld"
  location (X Y Z) 12.2494 -12.3017 6.03596, rotation 0 87 0; relative location -1 0 0, rotation 0 0 0
  bounding box size 1.86411 1.86667 1.33148
  cross sections:
    n  XDelta  YDelta  ZDelta  shape
    0  0       0       0       point
    1  1       0       0       circle Circle_Diameter=1.7
    2  0.25    0       0       as above
    3  0       0       0       point

Stack "r_4_pyl", child of "r_4_bld"
  location (X Y Z) 12.3148 -12.3017 4.78767, rotation 0 87 0; relative location 0.25 0 0, rotation 0 0 0
  bounding box size 1.7173 1.7 1.32712
  cross sections:
    n  XDelta  YDelta  ZDelta  shape
    0  0       0       0       point
    1  0       0       0       circle Circle_Diameter=1.7
    2  0.25    0       0       as above
    3  1       0       0       point

Blank "s_005.alcollfltctrl", child of "r_4_bld"
  location (X Y Z) 12.3043 -12.3017 4.9874, rotation 0 87 0; relative location 0.05 0 0, rotation 0 0 0
  mass: Density=1 Shell_Flag=0 Mass_Area=1 Mass_Prior=0 PointMass=2431.65 CGx=0 CGy=0 CGz=0 Ixx=0 Iyy=0 Izz=0 Ixy=0 Ixz=0 Iyz=0

Blank "s_001.aldeice", child of "r_4_bld"
  location (X Y Z) 12.3069 -12.3017 4.93746, rotation 0 87 0; relative location 0.1 0 0, rotation 0 0 0
  mass: Density=1 Shell_Flag=0 Mass_Area=1 Mass_Prior=0 PointMass=486.33 CGx=0 CGy=0 CGz=0 Ixx=0 Iyy=0 Izz=0 Ixy=0 Ixz=0 Iyz=0

Blank "pn-1-023.algbmass", child of "r_4_bld"
  location (X Y Z) 12.3383 -12.3017 4.33829, rotation 0 87 0; relative location 0.7 0 0, rotation 0 0 0
  mass: Density=1 Shell_Flag=0 Mass_Area=1 Mass_Prior=0 PointMass=1.811 CGx=0 CGy=0 CGz=0 Ixx=0 Iyy=0 Izz=0 Ixy=0 Ixz=0 Iyz=0

Stack "pn_1_000.algbvol", child of "r_4_bld"
  location (X Y Z) 12.3226 -12.3017 4.63788, rotation 0 87 0; relative location 0.4 0 0, rotation 0 0 0
  bounding box size 1.00774 1 0.226097
  cross sections:
    n  XDelta  YDelta  ZDelta  shape
    0  0       0       0       point
    1  0       0       0       circle Circle_Diameter=1
    2  0.174   0       0       as above
    3  0       0       0       point

Stack "pn_1_000.alcoolvol", child of "r_4_bld"
  location (X Y Z) 12.354 -12.3017 4.0387, rotation 0 87 0; relative location 1 0 0, rotation 0 0 0
  bounding box size 1.01171 1 0.301993
  cross sections:
    n  XDelta  YDelta  ZDelta  shape
    0  0       0       0       point
    1  0       0       0       circle Circle_Diameter=1
    2  0.25    0       0       as above
    3  0       0       0       point

Stack "pn_1_000.rfgbshaftvol", child of "r_4_bld"
  location (X Y Z) 12.2965 -12.3017 5.13719, rotation 0 87 0; relative location -0.1 0 0, rotation 0 0 0
  bounding box size 0.281059 0.25 0.612262
  cross sections:
    n  XDelta  YDelta  ZDelta  shape
    0  0       0       0       point
    1  0       0       0       circle Circle_Diameter=0.25
    2  0.6     0       0       as above
    3  0       0       0       point

Wing "r_2_spt_200.spt12", child of "ndarcSLBLWL"
  location (X Y Z) -0.263303 0 1.00157, rotation 0 0 0
  symmetric about XZ
  bounding box size 16.7692 24.6034 1.10572
  mass: Density=0.060026 Shell_Flag=0 Mass_Area=1 Mass_Prior=0
  totals: TotalSpan=24.6184 TotalProjectedSpan=24.6034 TotalChord=2.8 TotalArea=69.6265 TotalAR=8.69393
  root: chord 4.48, twist 6, NACA 4-series Camber=0 CamberLoc=0.2 ThickChord=0.2
  sections:
    n  Span     Root_Chord  Tip_Chord  Area     Sweep  Sweep_Location  Dihedral  Twist  Twist_Location  tip airfoil
    1  6.36144  4.48        2.8        23.1556  -45    0               2         7      0.25            NACA 4-series Camber=0 CamberLoc=0.2 Invert=1 ThickChord=0.2
    2  5.94777  2.8         1.12       11.6576  -45    0               2         8      0.25            NACA 4-series Camber=0 CamberLoc=0.2 Invert=1 ThickChord=0.3

Wing "r_4_spt_200.spt34", child of "ndarcSLBLWL"
  location (X Y Z) 0.0336669 0 1.31386, rotation 0 0 0
  symmetric about XZ
  bounding box size 12.8706 24.6034 4.21649
  mass: Density=0.081426 Shell_Flag=0 Mass_Area=1 Mass_Prior=0
  totals: TotalSpan=24.9416 TotalProjectedSpan=24.6034 TotalChord=2.90139 TotalArea=61.3571 TotalAR=9.86566
  root: chord 4.26667, twist 5, NACA 4-series Camber=0.027 CamberLoc=0.245455 DeltaX=-0.0272727 DeltaY=-0.05 Scale=1.02727 ThickChord=0.27273
  sections:
    n  Span     Root_Chord  Tip_Chord  Area     Sweep   Sweep_Location  Dihedral  Twist  Twist_Location  tip airfoil
    1  2.46191  4.26667     3.26667    9.27318  46.686  0               9         8      0.25            NACA 4-series Camber=0 CamberLoc=0.2 DeltaY=-0.1 ThickChord=0.272727
    2  2.00075  3.26667     2.77083    6.03975  46.686  0               6         8      0.25            NACA 4-series Camber=0 CamberLoc=0.2 DeltaX=-0.107438 ThickChord=0.2
    3  8.00813  2.77083     1.06667    15.3656  40      0               10.25     10     0.25            NACA 4-series Camber=0 CamberLoc=0.2 DeltaY=1.23967 ThickChord=0.32

Fuselage "e_1", child of "ndarcSLBLWL"
  location (X Y Z) 5 0 -0.543, rotation 0 30 0
  bounding box size 3.62081 1.8 3.1297
  mass: Density=1.00622 Shell_Flag=0 Mass_Area=1 Mass_Prior=2
  Design: Length=3.133
  cross sections:
    n  XLocPercent  YLocPercent  ZLocPercent  shape
    0  0            0            0            point
    1  0.1          0            0            ellipse Ellipse_Height=1.8 Ellipse_Width=1.8
    2  0.5          0            0            ellipse Ellipse_Height=2.5 Ellipse_Width=1.8
    3  0.9          0            0            ellipse Ellipse_Height=1.8 Ellipse_Width=1.8
    4  1            0            0            point

Fuselage "ft_1_100.FULL", child of "ndarcSLBLWL"
  location (X Y Z) 3.37 0 -3.58696, rotation 0 0 0
  bounding box size 1.84928 1.6 1.6
  mass: Density=1.538 Shell_Flag=0 Mass_Area=1 Mass_Prior=2
  Design: Length=1.6
  cross sections:
    n  XLocPercent  YLocPercent  ZLocPercent  shape
    0  0            0            0            point
    1  0.013587     0            0            rounded rectangle RoundRectXSec_Radius=0.1 RoundedRect_Height=1.6 RoundedRect_Width=1.6
    2  0.5          0            0            as above
    3  0.991848     0            0            as above
    4  1            0            0            point

Fuselage "ft_1_100.EMPTY", child of "ft_1_100.FULL"
  location (X Y Z) 3.37 0 -3.58696, rotation 0 0 0; relative location 0 0 0, rotation 0 0 0
  bounding box size 1.84928 1.6 1.6
  mass: Density=0.2974 Shell_Flag=0 Mass_Area=1 Mass_Prior=2
  Design: Length=1.6
  cross sections:
    n  XLocPercent  YLocPercent  ZLocPercent  shape
    0  0            0            0            point
    1  0.013587     0            0            rounded rectangle RoundRectXSec_Radius=0.1 RoundedRect_Height=1.6 RoundedRect_Width=1.6
    2  0.5          0            0            as above
    3  0.991848     0            0            as above
    4  1            0            0            point

Blank "ndarcCG", child of "ndarcSLBLWL"
  location (X Y Z) 0 0 0, rotation -180 0 -180; relative location 0 0 0, rotation 0 180 0

Stack "fg_000.stack", child of "ndarcSLBLWL"
  location (X Y Z) -11 0 -3.13, rotation 0 0 0
  bounding box size 21.0427 6.68428 6.83107
  cross sections:
    n  XDelta   YDelta  ZDelta   shape
    0  0        0       0        point
    1  6.33044  0       0.59623  general fuselage BotStr=1.39745 BotTanAngle=85.9091 CornerRad=0 Height=6 LowStr=1.32259 MaxWidthLoc=0 TopStr=0.7856 TopTanAngle=90 UpStr=1.34755 Width=6.25909
    2  3.971    0       0.25111  general fuselage BotStr=1.39745 BotTanAngle=85.9091 CornerRad=0 Height=6.7455 LowStr=1.32259 MaxWidthLoc=0.17273 TopStr=1.46651 TopTanAngle=90 UpStr=0.95595 Width=6.42973
    3  3.76307  0       0.07771  general fuselage BotStr=1.39745 BotTanAngle=85.9091 CornerRad=0 Height=6.63824 LowStr=1.32259 MaxWidthLoc=0.4 TopStr=1.43141 TopTanAngle=90 UpStr=0.73813 Width=6.25909
    4  3.12851  0       0.68548  general fuselage BotStr=1.12295 BotTanAngle=90 CornerRad=0 Height=5.06558 LowStr=0.91146 MaxWidthLoc=0.67273 TopStr=1.64396 TopTanAngle=86.3182 UpStr=0.16468 Width=4.37339
    5  3.80698  0       2.00279  point
  SS_Rectangle "Upper-window": Center_U=0.141304 Center_W=0.788043 U_Length=0.146739 W_Length=0.570652
  SS_Rectangle "Large-Door-left": Center_U=0.426829 Center_W=0.445122 U_Length=0.390244 W_Length=0.2
  SS_Rectangle "upper-door-right": Center_U=0.426829 Center_W=1 U_Length=0.384146 W_Length=0.0914634
  SS_Rectangle "lower-door-right": Center_U=0.426829 Center_W=0.0487805 U_Length=0.384146 W_Length=0.195122

Fuselage "e_1_cwl", child of "fg_000.stack"
  location (X Y Z) -3.696 0 0.543, rotation 0 0 0; relative location 7.304 0 3.673, rotation 0 0 0
  bounding box size 10.7981 5 2.55557
  mass: Density=0.047217 Shell_Flag=0 Mass_Area=1 Mass_Prior=0
  Design: Length=10.1818
  cross sections:
    n  XLocPercent  YLocPercent  ZLocPercent  shape
    0  0            0            -0.0652174   point
    1  0.25         0            0            ellipse Ellipse_Height=2.5 Ellipse_Width=5
    2  1            0            0            ellipse Ellipse_Height=2.5 Ellipse_Width=3.69091
    3  1            0            -0.0108696   point

Custom "e_1_duct_000.nomap", child of "fg_000.stack"
  location (X Y Z) 1.905 0 0.476, rotation 0 0 0; relative location 12.905 0 3.606, rotation 0 0 0
  bounding box size 9.83333 4.05964 2.04062
  mass: Density=0 Shell_Flag=0 Mass_Area=1 Mass_Prior=0
  Design: Camber=0.4125 CamberLoc=0.6 Chord=9.83333 Height=1.33876 InvertFlag=0 Shape=0.216667 ThickChord=0.0708333 Width=3.348
  custom script Duct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

Wing "lg_040.Front", child of "fg_000.stack"
  location (X Y Z) -6.33 2.25 -5, rotation 0 7 0; relative location 4.67 2.25 -1.87, rotation 0 7 0
  symmetric about XZ
  bounding box size 1.52112 6.88822 2.51406
  mass: Density=9.5123 Shell_Flag=0 Mass_Area=1 Mass_Prior=0
  totals: TotalSpan=4.92273 TotalProjectedSpan=2.38822 TotalChord=0.95 TotalArea=4.67659 TotalAR=1.2196
  root: chord 1, twist 0, NACA 4-series Camber=0 CamberLoc=0.2 ThickChord=0.334842
  sections:
    n  Span     Root_Chord  Tip_Chord  Area    Sweep  Sweep_Location  Dihedral  Twist  Twist_Location  tip airfoil
    1  2.46136  1           0.9        2.3383  20     0               -60.9783  0      0.25            NACA 4-series Camber=0 CamberLoc=0.2 ThickChord=0.2

Wing "lg_040.Rear", child of "fg_000.stack"
  location (X Y Z) 3.126 2 -4.565, rotation 0 7 0; relative location 14.126 2 -1.435, rotation 0 7 0
  symmetric about XZ
  bounding box size 1.32276 6.91085 2.96291
  mass: Density=8.8276 Shell_Flag=0 Mass_Area=1 Mass_Prior=0
  totals: TotalSpan=6 TotalProjectedSpan=2.91085 TotalChord=0.925 TotalArea=5.55 TotalAR=1.52667
  root: chord 1, twist 0, NACA 4-series Camber=0 CamberLoc=0.2 ThickChord=0.334842
  sections:
    n  Span  Root_Chord  Tip_Chord  Area   Sweep  Sweep_Location  Dihedral  Twist  Twist_Location  tip airfoil
    1  3     1           0.85       2.775  15     0               -60.9783  0      0.25            NACA 4-series Camber=0 CamberLoc=0.2 ThickChord=0.2

Fuselage "lg_020.skids", child of "fg_000.stack"
  location (X Y Z) -5.435 -3.45 -7.259, rotation 0 0 0; relative location 5.565 -3.45 -4.129, rotation 0 0 0
  symmetric about XZ
  bounding box size 9.44697 7.15 0.25
  mass: Density=2.144 Shell_Flag=0 Mass_Area=1 Mass_Prior=0
  Design: Length=9.36364
  cross sections:
    n  XLocPercent  YLocPercent  ZLocPercent  shape
    0  0            0            0            point
    1  0            0            0            circle Circle_Diameter=0.25
    2  0.5          0            0            as above
    3  1            0            0            as above
    4  1            0            0            point

Custom "fseat", child of "fg_000.stack"
  location (X Y Z) -5.0345 1.55 -4.34617, rotation 0 -80 0; relative location 5.9655 1.55 -1.21617, rotation 0 -80 0
  bounding box size 2.7156 1.5 3.28829
  mass: Density=0 Shell_Flag=0 Mass_Area=1 Mass_Prior=0
  Design: BackAngle=10 BackHeight=3 BackThick=0.3 SeatHeight=0.3 SeatLength=1.5 Width=1.5
  custom script Seat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

Blank "s_001.fseat", child of "fseat"
  location (X Y Z) -5.0345 1.55 -4.34617, rotation 0 -80 0; relative location 0 0 0, rotation 0 0 0

Custom "mseats", child of "fg_000.stack"
  location (X Y Z) -1.70117 -1.55 -4.34617, rotation 0 -80 0; relative location 9.29883 -1.55 -1.21617, rotation 0 -80 0
  bounding box size 2.7156 1.5 3.28829
  mass: Density=0 Shell_Flag=0 Mass_Area=1 Mass_Prior=0
  Design: BackAngle=10 BackHeight=3 BackThick=0.3 SeatHeight=0.3 SeatLength=1.5 Width=1.5
  custom script Seat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

Blank "s_001.mseats", child of "mseats"
  location (X Y Z) -1.70117 -1.55 -4.34617, rotation 0 -80 0; relative location 0 0 0, rotation 0 0 0

Custom "rseats", child of "fg_000.stack"
  location (X Y Z) 1.63216 -1.55 -4.34617, rotation 0 -80 0; relative location 12.6322 -1.55 -1.21617, rotation 0 -80 0
  bounding box size 2.7156 1.5 3.28829
  mass: Density=0 Shell_Flag=0 Mass_Area=1 Mass_Prior=0
  Design: BackAngle=10 BackHeight=3 BackThick=0.3 SeatHeight=0.3 SeatLength=1.5 Width=1.5
  custom script Seat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

Blank "s_001.rseats", child of "rseats"
  location (X Y Z) 1.63216 -1.55 -4.34617, rotation 0 -80 0; relative location 0 0 0, rotation 0 0 0

Blank "VIBRATION", child of "fg_000.stack"
  location (X Y Z) -0.24 0 -1.5, rotation 0 0 0; relative location 10.76 0 1.63, rotation 0 0 0
  mass: Density=1 Shell_Flag=0 Mass_Area=1 Mass_Prior=0 PointMass=2.185 CGx=0 CGy=0 CGz=0 Ixx=0 Iyy=0 Izz=0 Ixy=0 Ixz=0 Iyz=0

Blank "CONTINGENCY", child of "fg_000.stack"
  location (X Y Z) -0.24 0 -1.5, rotation 0 0 0; relative location 10.76 0 1.63, rotation 0 0 0
  mass: Density=1 Shell_Flag=0 Mass_Area=1 Mass_Prior=0 PointMass=3.641 CGx=0 CGy=0 CGz=0 Ixx=0 Iyy=0 Izz=0 Ixy=0 Ixz=0 Iyz=0

Blank "FIXEDUSEFULLOAD", child of "fg_000.stack"
  location (X Y Z) -0.24 0 -1.5, rotation 0 0 0; relative location 10.76 0 1.63, rotation 0 0 0
  mass: Density=1 Shell_Flag=0 Mass_Area=1 Mass_Prior=0 PointMass=0.3108 CGx=0 CGy=0 CGz=0 Ixx=0 Iyy=0 Izz=0 Ixy=0 Ixz=0 Iyz=0

Blank "s-016.everythingelse", child of "fg_000.stack"
  location (X Y Z) 0 0 -0.714, rotation 0 0 0; relative location 11 0 2.416, rotation 0 0 0
  mass: Density=1 Shell_Flag=0 Mass_Area=1 Mass_Prior=0 PointMass=2.497 CGx=0 CGy=0 CGz=0 Ixx=0 Iyy=0 Izz=0 Ixy=0 Ixz=0 Iyz=0

Blank "pn_1_008.combinergb", child of "fg_000.stack"
  location (X Y Z) 1.5 0 0, rotation 0 0 0; relative location 12.5 0 3.13, rotation 0 0 0
  mass: Density=1 Shell_Flag=0 Mass_Area=1 Mass_Prior=0 PointMass=0.63 CGx=0 CGy=0 CGz=0 Ixx=0 Iyy=0 Izz=0 Ixy=0 Ixz=0 Iyz=0

Blank "s_030.avionics", child of "fg_000.stack"
  location (X Y Z) -7.381 0 -4.048, rotation 0 0 0; relative location 3.619 0 -0.918, rotation 0 0 0
  mass: Density=1 Shell_Flag=0 Mass_Area=1 Mass_Prior=0 PointMass=14589.9 CGx=0 CGy=0 CGz=0 Ixx=0 Iyy=0 Izz=0 Ixy=0 Ixz=0 Iyz=0

Blank "s_030.ECS", child of "fg_000.stack"
  location (X Y Z) 0 0 0, rotation 0 0 0; relative location 11 0 3.13, rotation 0 0 0
  mass: Density=1 Shell_Flag=0 Mass_Area=1 Mass_Prior=0 PointMass=14589.9 CGx=0 CGy=0 CGz=0 Ixx=0 Iyy=0 Izz=0 Ixy=0 Ixz=0 Iyz=0

Blank "s_005.collfltctrl", child of "fg_000.stack"
  location (X Y Z) -10.95 0 -1.41304, rotation 0 0 0; relative location 0.05 0 1.71696, rotation 0 0 0
  mass: Density=1 Shell_Flag=0 Mass_Area=1 Mass_Prior=0 PointMass=2431.65 CGx=0 CGy=0 CGz=0 Ixx=0 Iyy=0 Izz=0 Ixy=0 Ixz=0 Iyz=0

Custom "remove_mseats", child of "fg_000.stack"
  location (X Y Z) -1.70117 1.55 -4.34617, rotation 0 -80 0; relative location 9.29883 1.55 -1.21617, rotation 0 -80 0
  bounding box size 2.7156 1.5 3.28829
  mass: Density=0 Shell_Flag=0 Mass_Area=1 Mass_Prior=0
  Design: BackAngle=10 BackHeight=3 BackThick=0.3 SeatHeight=0.3 SeatLength=1.5 Width=1.5
  custom script Seat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

Custom "remove_rseats", child of "fg_000.stack"
  location (X Y Z) 1.63216 1.55 -4.34617, rotation 0 -80 0; relative location 12.6322 1.55 -1.21617, rotation 0 -80 0
  bounding box size 2.7156 1.5 3.28829
  mass: Density=0 Shell_Flag=0 Mass_Area=1 Mass_Prior=0
  Design: BackAngle=10 BackHeight=3 BackThick=0.3 SeatHeight=0.3 SeatLength=1.5 Width=1.5
  custom script Seat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

Stack "s_010.mephoist", child of "ndarcSLBLWL"
  location (X Y Z) -0.543478 4.02174 0.543478, rotation 0 0 0
  bounding box size 3 1.2 1.2
  cross sections:
    n  XDelta  YDelta  ZDelta  shape
    0  0       0       0       point
    1  0.5     0       0       circle Circle_Diameter=1.2
    2  2       0       0       as above
    3  0.5     0       0       point

Stack "mep_010.rafts", child of "ndarcSLBLWL"
  location (X Y Z) -6.52174 -0.869565 -3.80435, rotation 0 0 0
  bounding box size 2 1.5 2.5
  cross sections:
    n  XDelta  YDelta  ZDelta  shape
    0  0       0       0       point
    1  0       0       0       rounded rectangle RoundRectXSec_Radius=0.2 RoundedRect_Height=2.5 RoundedRect_Width=1.5
    2  2       0       0       as above
    3  0       0       0       point

Stack "mep_010.firstaidwater", child of "ndarcSLBLWL"
  location (X Y Z) -5.97826 -2.17391 -3.36957, rotation 0 0 0
  bounding box size 1.5 1 1.5
  cross sections:
    n  XDelta  YDelta  ZDelta  shape
    0  0       0       0       point
    1  0       0       0       rounded rectangle RoundRectXSec_Radius=0.2 RoundedRect_Height=1.5 RoundedRect_Width=1
    2  1.5     0       0       as above
    3  0       0       0       point

Stack "mep_010.FLIRball", child of "ndarcSLBLWL"
  location (X Y Z) -10 0 -5, rotation 0 0 0
  bounding box size 1 1 1
  cross sections:
    n  XDelta  YDelta  ZDelta  shape
    0  0       0       0       point
    1  0.5     0       0       circle Circle_Diameter=1
    2  0.5     0       0       point
  SS_Ellipse "SS_ELLIP_0": Center_U=0.25 Center_W=0.25 U_Length=0.2 W_Length=0.2

Stack "mep_010.FLIRmount", child of "ndarcSLBLWL"
  location (X Y Z) -9.67391 0 -4.8913, rotation 0 0 0
  bounding box size 1.95 0.7 1
  cross sections:
    n  XDelta  YDelta  ZDelta  shape
    0  0       0       0       point
    1  0.25    0       0       rounded rectangle RoundRectXSec_Radius=0.2 RoundedRect_Height=1 RoundedRect_Width=0.7
    2  0.7     0       0       as above
    3  1       0       0       point

Stack "mep_010,litter", child of "ndarcSLBLWL"
  location (X Y Z) -3.58696 1.52174 -4.67391, rotation 0 0 0
  bounding box size 7 2 0.500001
  cross sections:
    n  XDelta  YDelta  ZDelta  shape
    0  0       0       0       point
    1  0.5     0       0       rounded rectangle RoundRectXSec_Radius=0.1 RoundedRect_Height=0.5 RoundedRect_Width=2
    2  3       0       0       as above
    3  3       0       0       as above
    4  0.5     0       0       point

Stack "mep_010.VHFelectronics", child of "ndarcSLBLWL"
  location (X Y Z) -7.71739 0 -2.93478, rotation 0 0 0
  bounding box size 0.666667 0.5 0.5
  cross sections:
    n  XDelta  YDelta  ZDelta  shape
    0  0       0       0       point
    1  0       0       0       rounded rectangle RoundRectXSec_Radius=0.01 RoundedRect_Height=0.5 RoundedRect_Width=0.5
    2  0.5     0       0       as above
    3  0       0       0       point

Wing "mep_001_VHFantenna", child of "mep_010.VHFelectronics"
  location (X Y Z) -0.326087 1.30435 1.41304, rotation 87 0 0; relative location 7.3913 1.30435 4.34783, rotation 87 0 0
  symmetric about XZ
  bounding box size 0.77735 2.73335 1.00046
  totals: TotalSpan=2 TotalProjectedSpan=2 TotalChord=0.35 TotalArea=0.7 TotalAR=5.71429
  root: chord 0.5, twist 0, NACA 4-series Camber=0 CamberLoc=0.2 ThickChord=0.1
  sections:
    n  Span  Root_Chord  Tip_Chord  Area  Sweep  Sweep_Location  Dihedral  Twist  Twist_Location  tip airfoil
    1  1     0.5         0.2        0.35  30     0               0         0      0.25            as above

Wing "mep_001_wirestrike", child of "ndarcSLBLWL"
  location (X Y Z) -4.24804 0 0.577334, rotation 90 0 0
  bounding box size 1.6547 0.050029 2
  totals: TotalSpan=2 TotalProjectedSpan=2 TotalChord=0.35 TotalArea=0.7 TotalAR=5.71429
  root: chord 0.5, twist 0, NACA 4-series Camber=0 CamberLoc=0.2 ThickChord=0.1
  sections:
    n  Span  Root_Chord  Tip_Chord  Area  Sweep  Sweep_Location  Dihedral  Twist  Twist_Location  tip airfoil
    1  2     0.5         0.2        0.7   -30    0               0         0      0.25            as above

Human "mep_Swimmer", child of "ndarcSLBLWL"
  location (X Y Z) 2.08955 -1.5 -3.28358, rotation 0 14.8507 0
  mass: Density=68.6782 Shell_Flag=0 Mass_Area=1 Mass_Prior=0
  Anthropometric: Age=30 AutoDensity=1 BMI=27.7 BMI_pct=0.5 GenderFlag=0 LenUnit=4 Mass=216.069 MassUnit=3 SitFrac=0.51 Stature=6.17126 Stature_pct=0.95 Volume=3.1461

Human "mep_HoistOperator", child of "ndarcSLBLWL"
  location (X Y Z) -1.19403 -1.5 -3.28358, rotation 0 14.8507 0
  mass: Density=68.6782 Shell_Flag=0 Mass_Area=1 Mass_Prior=0
  Anthropometric: Age=30 AutoDensity=1 BMI=27.7 BMI_pct=0.5 GenderFlag=0 LenUnit=4 Mass=216.069 MassUnit=3 SitFrac=0.51 Stature=6.17126 Stature_pct=0.95 Volume=3.1461

Human "crew_pilot", child of "ndarcSLBLWL"
  location (X Y Z) -4.55224 1.5 -3.28358, rotation 0 14.8507 0
  mass: Density=68.9408 Shell_Flag=0 Mass_Area=1 Mass_Prior=0
  Anthropometric: Age=30 AutoDensity=1 BMI=27.7 BMI_pct=0.5 GenderFlag=0 LenUnit=4 Mass=216.069 MassUnit=3 SitFrac=0.51 Stature=6.17126 Stature_pct=0.95 Volume=3.13412

Human "pay_aftpax", child of "ndarcSLBLWL"
  location (X Y Z) 2.08955 -1.5 -3.28358, rotation 0 14.8507 0
  symmetric about XZ
  mass: Density=68.6782 Shell_Flag=0 Mass_Area=1 Mass_Prior=0
  Anthropometric: Age=30 AutoDensity=1 BMI=27.7 BMI_pct=0.5 GenderFlag=0 LenUnit=4 Mass=216.069 MassUnit=3 SitFrac=0.51 Stature=6.17126 Stature_pct=0.95 Volume=3.1461

Human "pay_midpax", child of "ndarcSLBLWL"
  location (X Y Z) -1.19403 -1.5 -3.28358, rotation 0 14.8507 0
  symmetric about XZ
  mass: Density=68.6782 Shell_Flag=0 Mass_Area=1 Mass_Prior=0
  Anthropometric: Age=30 AutoDensity=1 BMI=27.7 BMI_pct=0.5 GenderFlag=0 LenUnit=4 Mass=216.069 MassUnit=3 SitFrac=0.51 Stature=6.17126 Stature_pct=0.95 Volume=3.1461

Human "HumanGeom", child of "ndarcSLBLWL"
  location (X Y Z) -0.326087 2.28261 -3.69565, rotation 0 90 0
  mass: Density=66.8042 Shell_Flag=0 Mass_Area=1 Mass_Prior=0
  Anthropometric: Age=30 AutoDensity=1 BMI=27.7 BMI_pct=0.5 GenderFlag=0 LenUnit=4 Mass=200.324 MassUnit=3 SitFrac=0.51 Stature=5.94216 Stature_pct=0.761818 Volume=2.99867

User parameters
  Default_Group:rotor_radius = 9.11237  (Default_Desc)

Parameter links (A drives B)
  r_1_bld:XForm:Y_Rel_Location -> r_2_spt_200.spt12:WingGeom:TotalProjectedSpan
  r_3_bld:XForm:Y_Rel_Location -> r_4_spt_200.spt34:WingGeom:TotalProjectedSpan

Advanced link "boom_rotor"
  input UserParms_rotor_radius = UserParm:Default_Group:rotor_radius
  output r_1_bld_Diameter = r_1_bld:Design:Diameter
  output r_1_bld_X_Rel_Location = r_1_bld:XForm:X_Rel_Location
  output r_1_bld_Y_Rel_Location = r_1_bld:XForm:Y_Rel_Location
  output r_2_bld_Diameter = r_2_bld:Design:Diameter
  output r_2_bld_X_Rel_Location = r_2_bld:XForm:X_Rel_Location
  output r_2_bld_Y_Rel_Location = r_2_bld:XForm:Y_Rel_Location
  output r_3_bld_Diameter = r_3_bld:Design:Diameter
  output r_3_bld_X_Rel_Location = r_3_bld:XForm:X_Rel_Location
  output r_3_bld_Y_Rel_Location = r_3_bld:XForm:Y_Rel_Location
  output r_4_bld_Diameter = r_4_bld:Design:Diameter
  output r_4_bld_X_Rel_Location = r_4_bld:XForm:X_Rel_Location
  output r_4_bld_Y_Rel_Location = r_4_bld:XForm:Y_Rel_Location
    r_1_bld_Diameter = UserParms_rotor_radius * 2;
    r_2_bld_Diameter = UserParms_rotor_radius * 2;
    r_3_bld_Diameter = UserParms_rotor_radius * 2;
    r_4_bld_Diameter = UserParms_rotor_radius * 2;
    r_1_bld_Y_Rel_Location = 11.334/16.79109 * r_1_bld_Diameter;
    r_1_bld_X_Rel_Location = -r_1_bld_Y_Rel_Location;
    r_2_bld_Y_Rel_Location = -11.334/16.79109 * r_2_bld_Diameter;
    r_2_bld_X_Rel_Location = r_2_bld_Y_Rel_Location;
    r_3_bld_Y_Rel_Location = 11.334/16.79109 * r_3_bld_Diameter;
    r_3_bld_X_Rel_Location = r_3_bld_Y_Rel_Location;
    r_4_bld_Y_Rel_Location = -11.334/16.79109 * r_4_bld_Diameter;
    r_4_bld_X_Rel_Location = -r_4_bld_Y_Rel_Location;

VSPAERO settings: Sref=49.5 bref=22 cref=2.25 Xcg=9.04452 Ycg=-0.0104482 Zcg=2.09208 AlphaStart=1 AlphaEnd=10 AlphaNpts=3 BetaStart=0 BetaEnd=0 BetaNpts=1 MachStart=0 MachEnd=0 MachNpts=1 ReCref=1e+07 Vinf=100 Rho=0.002377
