OpenVSP model (file version 5), 4 components.
Geometry view with OpenVSP parameter names; values to 6 digits, angles in degrees, lengths in the model's unit.
Overall bounding box: X_Min=0 X_Len=226.234 Y_Min=-185.7 Y_Len=371.4 Z_Min=-21.8797 Z_Len=54.7586

Wing "wing"
  location (X Y Z) 64.8349 0 -19.1926, rotation 0 0 0
  symmetric about XZ
  bounding box size 49.4648 371.4 23.9182
  totals: TotalSpan=375.683 TotalProjectedSpan=371.4 TotalChord=33.3098 TotalArea=14013.9 TotalAR=9.84295
  root: chord 49.4648, twist 0, NACA 4-series Camber=0 CamberLoc=0.2 ThickChord=0.1
  sections:
    n  Span     Root_Chord  Tip_Chord  Area     Sweep    Sweep_Location  Dihedral  Twist  Twist_Location  tip airfoil
    1  20.8989  49.4648     46.8073    1005.99  2.77273  0               5.43689   0      0.25            as above
    2  101.151  46.8073     33.9448    4084.06  2.77273  0               5.43689   0      0.25            as above
    3  36.782   33.9448     29.2675    1162.54  2.77273  0               5.43689   0      0.25            as above
    4  23.3606  29.2675     26.2969    649.01   2.77273  0               5.43689   0      0.25            as above
    5  5.64919  26.2969     11         105.349  68.6585  0               40        0      0.25            as above

Fuselage "fuselage"
  location (X Y Z) 0 0 0, rotation 0 0 0
  bounding box size 207.428 47.4609 43.3147
  Design: Length=207.428
  cross sections:
    n  XLocPercent  YLocPercent  ZLocPercent  shape
    0  0            0            0            point
    1  0.0637989    0            0            circle Circle_Diameter=11.1273
    2  0.0747706    0            0            ellipse Ellipse_Height=12 Ellipse_Width=30.4455
    3  0.161151     0            -0.023       ellipse Ellipse_Height=24 Ellipse_Width=34.1925
    4  0.319293     0            -0.028       general fuselage BotStr=0.83 BotTanAngle=90 CornerRad=0 Height=28 LowStr=1.68027 MaxWidthLoc=0 TopStr=1.1 TopTanAngle=90 UpStr=0.83 Width=41
    5  0.502157     0            0            general fuselage BotStr=0.83 BotTanAngle=90 CornerRad=0 Height=39 LowStr=1.58045 MaxWidthLoc=0 TopStr=1.3 TopTanAngle=90 UpStr=0.83 Width=41
    6  0.931057     0            -0.015       ellipse Ellipse_Height=12.8109 Ellipse_Width=7.24412
    7  1            0            -0.01        ellipse Ellipse_Height=5.54455 Ellipse_Width=0

Wing "htail"
  location (X Y Z) 194.246 0 1.60217, rotation 0 0 0
  symmetric about XZ
  bounding box size 29.6659 98.8377 2.73096
  totals: TotalSpan=98.8632 TotalProjectedSpan=98.8377 TotalChord=18.138 TotalArea=2000.32 TotalAR=4.88366
  root: chord 15.6364, twist 0, NACA 4-series Camber=0 CamberLoc=0.2 ThickChord=0.1
  sections:
    n  Span     Root_Chord  Tip_Chord  Area     Sweep    Sweep_Location  Dihedral  Twist  Twist_Location  tip airfoil
    1  12.1771  15.6364     27.299     261.413  11       0               2.62136   0      0.25            as above
    2  33.0846  27.299      14.2969    688.091  11       0               0         0      0.25            as above
    3  4.16992  14.2969     10         50.658   24.8636  0               0         0      0.25            as above

Wing "vtail"
  location (X Y Z) 202.225 0 -12.3906, rotation 90 0 0
  bounding box size 49.3276 4.00508 45.2695
  totals: TotalSpan=45.2695 TotalProjectedSpan=45.2695 TotalChord=27.8775 TotalArea=1291.41 TotalAR=1.5869
  root: chord 0.0330743, twist 0, NACA 4-series Camber=0 CamberLoc=0.2 ThickChord=0.1
  sections:
    n  Span     Root_Chord  Tip_Chord  Area     Sweep     Sweep_Location  Dihedral  Twist  Twist_Location  tip airfoil
    1  2.90086  0.0330743   25         36.3088  -78.7799  0               0         0      0.25            as above
    2  14.0492  25          40.0352    456.845  -37.2784  0               0         0      0.25            as above
    3  2.0877   40.0352     38.2884    81.7581  49.3546   0               0         0      0.25            as above
    4  26.2318  38.2884     16.3397    716.497  49.3545   0               0         0      0.25            as above
